## DIMENSIONAMENTO DO INDUTOR
fs := 100000*Hz
L1 := 0.035*mH  # Valor da indutância
Ipico := 20*A  # Corrente de pico no indutor
Ief := 15*A  # Corrente eficaz no indutor
Jmax := 350*A*cm^-2  # Densidade de corrente
B := 0.3*T  # Densidade de fluxo máxima para núcleo de Ferrite
AeAw := L1*Ipico*Ief/(B*Jmax)  # Produto de áreas Ae (eficaz) e Aw (janela)
AeAw = 1 cm^4  # Produto de áreas
# A partir do produto das áreas pode-se escolher o núcleo apropriado através do catálogo do
# fabricante Foi escolhido o núcleo EE-42/21/15 da Thornton.
AeAw := 2.84*cm^4  # Produto de áreas do núcleo escolhido
Ae := 1.81*cm^2  # Área efetiva do núcleo
Aw := 1.57*cm^2  # Área da janela do núcleo
N := (L1*Ipico)/(B*Ae)
N = 12.8913  # Número de espiras
μo := 4*π*10^-7*H*m^-1  # Permeabilidade do ar
Lg := N^2*μo*Ae/L1  # Distância do entreferro (reatância para limitar B)
Lg/2 = 0.539991 mm  # Distância do entreferro em cada perna do núcleo
S := Ief/Jmax
S = 0.0428571 cm^2  # Área total de cobre do condutor equivalente
# Levando-se em consideração o efeito pelicular para a freqüência de comutação fs:
P := 7.5*cm*s^-0.5/sqrt(fs)
P = 0.0237171 cm  # Profundidade de penetração (é usado como raio do condutor utilizado)
# O diâmetro do fio deve ser no máximo igual a duas vezes a profundidade de penetração.
Diam := 2*P
Diam = 0.0474342 cm  # Fio máximo 24 AWG
Fio := Ief/Jmax
Fio = 0.0428571 cm^2
S19AWG := 0.016504 cm^2  # Área individual de cada fio
# Deve-se agora determinar a possibilidade de execução do enrolamento no núcleo proposto.
Aw = 1.57 cm^2  # Área disponível na janela do carretel
Acu := N*S19AWG  # Vista de corte, a área ocupada é igual a número de espiras vezes a área de um condutor
3*Acu = 0.638276 cm^2  # Área ocupada pelos cabos
# A relação entre as áreas deve situar-se em aproximadamente 40%
R := 2*Acu/Aw
R = 0.27103  # O indutor é viável tecnicamente (R<0,4)
# Quantidade de fio
Compmedio := 56*mm
Comprimento := N*Compmedio
Comprimento = 0.721915 m
# O indutor então fica assim especificado:
# L1 = 500mH
# Núcleo EE-42/21/15 Thorton
# 85 espiras
# cabo 1x18 AWG
