# Conversor Cuk em CCM
# Tensão de Entrada:
V_in := 36 V
# Tensão de Saída:
V_out := 50 V
# Potência:
P := 750 W
# Corrente de saída
I_o := P/V_out = 15 A
# Corrente de entrada
I_in := P/V_in = 20.8333 A
# Frequência de
# Comutação
f_s := 100 kHz
# Período de
# Comutação
T := 1/f_s = 1e-5 s
# Ondulação de Corrente
# Pico a Pico em L1
ΔL_1 := 40 %*I_in = 8.33333 A
# Ondulação de Corrente
# Pico a Pico em L1
ΔL_2 := 40 %*I_o = 6 A
# ======================= CALCULOS  ====================  =====================================================
# Ciclo de Trabalho
# Calculado (D):
D_calculado := V_out/(V_in + V_out) = 0.581395
# Ciclo de Trabalho
# Adotado (D):
D := 0.4
# Tensão Média no Capacitor
# de Transferência (VC1):
V_C1 := V_in + V_out = 86 V
# Indutor de
# Entrada (L1):
L_1 := V_in*D*T/ΔL_1 = 1.728e-5 H
# Indutor de
# Saída (L2):
L_2 := V_out*(1 - D)*T/ΔL_2 = 5e-5 H
# Ondulação de Tensão
# em C1
ΔV_C1 := 1 %*V_C1 = 0.86 V
# Ondulação de Tensão
# em C2
ΔV_out := 1 %*V_C1 = 0.86 V
# Capacitor de Transferência
# de Energia (C1):
C_1 := I_o*D*T/ΔV_C1 = 6.97674e-5 F
# Capacitor de Transferência
# de Energia (C2):
C_2 := ΔL_1*T/ΔV_out = 9.68992e-5 F
# Carga de saída::
R := V_out^2/P = 3.33333 Ω
