# Conversor Cuk em CCM
# Tensão de Entrada:
V_in := 36 V
# Tensão de Saída:
V_out := 50 V
# Potência:
P := 750 W
# Corrente de saída
I_o := P/V_out = 15 A
# Corrente de entrada
I_in := P/V_in = 20.8333 A
# Frequência de
# Comutação
f_s := 100 kHz
# Período de
# Comutação
T := 1/f_s = 1e-5 s
# Ondulação de Corrente
# Pico a Pico em L1
ΔL_1 := 40 %*I_in = 8.33333 A
# Ondulação de Corrente
# Pico a Pico em L1
ΔL_2 := 40 %*I_o = 6 A
# ======================= CALCULOS  ====================  =====================================================
# Ciclo de Trabalho
# Calculado (D):
D_calculado := V_out/(V_in + V_out) = 0.581395
# Ciclo de Trabalho
# Adotado (D):
D := D_calculado = 0.581395
# Tensão Média no Capacitor
# de Transferência (VC1):
V_C1 := V_in + V_out = 86 V
# Indutor de
# Entrada (L1):
L_1 := V_in*D*T/ΔL_1 = 2.51163e-5 H
# Indutor de
# Saída (L2):
L_2 := V_out*(1 - D)*T/ΔL_2 = 3.48837e-5 H
# Ondulação de Tensão
# em C1
ΔV_C1 := 5 %*V_C1 = 4.3 V
# Ondulação de Tensão
# em C2
ΔV_out := 5 %*V_out = 2.5 V  # Não queria falar nada não, mas vendo sua simulação parece que a tensão sobre o capacitor de saída é só Vout kk
# Capacitor de Transferência
# de Energia (C1):
C_1 := I_o*D*T/ΔV_C1 = 2.02812e-5 F
# Capacitor de Transferência
# de Energia (C2):
C_2 := ΔL_1*T/(8*ΔV_out) = 4.16667e-6 F
# Carga de saída:
R_o := V_out^2/P = 3.33333 Ω
# [area: Gráficos]
# O intuito dessa seção é criar alguns gráficos para analisar vizualmente o comportamento de algumas variaveis. Nem todos os gráficos vão ser interessantes ou uteis, é mais um exercicio de análise!
# Basicamente o que é feito: É só pegar as fórmulas dos seus cálculos, assumir que tudo é constante menos uma variavel. E desse jeito você vai fazendo combinações que podem ser interessantes ou não.
D_graph(V_out_variable) := V_out_variable/(V_in + V_out_variable)
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# O que esse gráfico me diz? Que se eu colocar uma razão ciclica nula no seu conversor ele vai estar desligado! Isso é ótimo pq permite que você implemente um softstart suave para ter uma operação mais segura.
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# O que esse gráfico me diz? Que mesmo com uma tensão muito maior na saída do que na entrada a razão ciclica ainda não chegou em 1. Temos um comportamento de assintona. Eu limitaria no seu código para a razão ciclica nunca poder passar de 0,85. Qualquer coisa acima disso pode colocar o conversor em uma região de instabilidade. Por mais que seu ponto de operação seja 0,581 durante os transitórios o conversor vai pedir mais.
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# -> p.u significa per unity, é uma forma chique de falar que você normalizou algo e essa variavel acabou ficando sem unidades.
D_graph1(V_in_variable) := V_out/(V_in_variable + V_out)
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L_graph100k(D_variable) := V_in*D_variable/(ΔL_1*100*kHz)
L_graph50k(D_variable) := V_in*D_variable/(ΔL_1*50*kHz)
L_graph150k(D_variable) := V_in*D_variable/(ΔL_1*150*kHz)
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# O que o gráfico nos diz? Que quanto maior a frequencia de chaveamento menor o valor da indutancia. Comportamento bem linear (fácil de ver pela equação do indutor de entrada)
# Vendo a equação do ganho, podemos isolar Vin:
Vin := V_out*(1 - D)/D = 36 V
L_graph50k_D(D_variable) := V_out*(1 - D_variable)/D_variable*D_variable/(ΔL_1*50*kHz)
L_graph150k_D(D_variable) := V_out*(1 - D_variable)/D_variable*D_variable/(ΔL_1*150*kHz)
L_graph100k_D(D_variable) := V_out*(1 - D_variable)/D_variable*D_variable/(ΔL_1*100*kHz)
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# A diferença desse gráfico para o anterior é que nesse a tensão de saída é constante e a de entrada é variavel. O anterior era o contrario.
L_graph_100k(V_in_variable) := V_in_variable*(V_out/(V_in_variable + V_out))/(ΔL_1*100*kHz)
L_graph_50k(V_in_variable) := V_in_variable*(V_out/(V_in_variable + V_out))/(ΔL_1*50*kHz)
L_graph_150k(V_in_variable) := V_in_variable*(V_out/(V_in_variable + V_out))/(ΔL_1*150*kHz)
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# O que temos aqui? Não sei! kkk Mas pelo visto a sua topologia não precisa um indutor de entrada maior do que 57uH (considerando a ondulação de 40%, a frequencia de chaveamento de 100kHz e tensão de saída em 50V).
# Quando você usa a função trace no gráfico e vai em 36 V você encontra certinho o valor de indutancia que você calculou lá em cima!
L_graph1_50k(V_out_variable) := V_in*(V_out_variable/(V_in + V_out_variable))/(ΔL_1*50*kHz)
L_graph1_150k(V_out_variable) := V_in*(V_out_variable/(V_in + V_out_variable))/(ΔL_1*150*kHz)
L_graph1_100k(V_out_variable) := V_in*(V_out_variable/(V_in + V_out_variable))/(ΔL_1*100*kHz)
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# Eu esperava que esse gráfico tivesse uma tendencia da indutancia igual ao anterior. Mas deve estar relacionado a relação Vin e Vout.
# Quando você usa a função trace no gráfico e vai em 50 V você encontra certinho o valor de indutancia que você calculou lá em cima!
L_2graph100k(D_variable) := V_out*(1 - D_variable)/(ΔL_2*100*kHz)
L_2graph50k(D_variable) := V_out*(1 - D_variable)/(ΔL_2*50*kHz)
L_2graph150k(D_variable) := V_out*(1 - D_variable)/(ΔL_2*150*kHz)
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# O que o gráfico nos diz? Que quanto maior a frequencia de chaveamento menor o valor da indutancia. Comportamento bem linear (fácil de ver pela equação do indutor de saída). Mas dessa vez quanto maior a razão cíclica menor precisa ser o valor do indutor de saída!
# Esse tipo de análise é bom para você caçar pontos para reduzir volume e peso dos componentes.
# Obviamente que quanto maior a frequencia maior vão ser suas perdas de comutação. Mas se o objetivo é volume, você pode comparar utilizando a lógica desses gráficos
# Sabemos que é possivel isolar Vou a partir da razão ciclica:
Vout := D*V_in/(1 - D) = 50 V
L_2graph100k_D(D_variable) := D_variable*V_in/(1 - D_variable)*(1 - D_variable)/(ΔL_2*100*kHz)
L_2graph50k_D(D_variable) := D_variable*V_in/(1 - D_variable)*(1 - D_variable)/(ΔL_2*50*kHz)
L_2graph150k_D(D_variable) := D_variable*V_in/(1 - D_variable)*(1 - D_variable)/(ΔL_2*150*kHz)
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L_2graph50k_V(V_in_variable) := V_out*(1 - (V_out/(V_in_variable + V_out)))/(ΔL_2*50*kHz)
L_2graph150k_V(V_in_variable) := V_out*(1 - (V_out/(V_in_variable + V_out)))/(ΔL_2*150*kHz)
L_2graph100k_V(V_in_variable) := V_out*(1 - (V_out/(V_in_variable + V_out)))/(ΔL_2*100*kHz)
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L_2graph1_50k(V_out_variable) := V_out_variable*(1 - (V_out_variable/(V_in + V_out_variable)))/(ΔL_2*50*kHz)
L_2graph1_150k(V_out_variable) := V_out_variable*(1 - (V_out_variable/(V_in + V_out_variable)))/(ΔL_2*150*kHz)
L_2graph1_100k(V_out_variable) := V_out_variable*(1 - (V_out_variable/(V_in + V_out_variable)))/(ΔL_2*100*kHz)
# Olhe que curioso, os dois gráficos são iguais :P
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# Ahá! Não são iguais nada. Só são muito parecidos kkkk
# Não seja como eu que chega em conclusões de forma precipitada kkk
C_1graph100k(D_variable) := I_o*D_variable/(ΔV_C1*100*kHz)
C_1graph50k(D_variable) := I_o*D_variable/(ΔV_C1*50*kHz)
C_1graph150k(D_variable) := I_o*D_variable/(ΔV_C1*150*kHz)
C_2graph100k := ΔL_1/(8*ΔV_out*100*kHz)
C_2graph50k := ΔL_1/(8*ΔV_out*50*kHz)
C_2graph150k := ΔL_1/(8*ΔV_out*150*kHz)
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C_1graph_50k(V_in_variable) := I_o*(V_out/(V_in_variable + V_out))/(ΔV_C1*50*kHz)
C_1graph_150k(V_in_variable) := I_o*(V_out/(V_in_variable + V_out))/(ΔV_C1*150*kHz)
C_1graph_100k(V_in_variable) := I_o*(V_out/(V_in_variable + V_out))/(ΔV_C1*100*kHz)
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C_1graph_50k_P(P_variable) := P_variable/V_out*(V_out/(V_in + V_out))/(ΔV_C1*50*kHz)
C_1graph_150k_P(P_variable) := P_variable/V_out*(V_out/(V_in + V_out))/(ΔV_C1*150*kHz)
C_1graph_100k_P(P_variable) := P_variable/V_out*(V_out/(V_in + V_out))/(ΔV_C1*100*kHz)
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C_2graph_50k(ΔL_1variable) := ΔL_1variable/(8*ΔV_out*50*kHz)
C_2graph_100k(ΔL_1variable) := ΔL_1variable/(8*ΔV_out*100*kHz)
C_2graph_150k(ΔL_1variable) := ΔL_1variable/(8*ΔV_out*150*kHz)
C_3graph_50k(ΔV_out_variable) := ΔL_1/(8*ΔV_out_variable*50*kHz)
C_3graph_100k(ΔV_out_variable) := ΔL_1/(8*ΔV_out_variable*100*kHz)
C_3graph_150k(ΔV_out_variable) := ΔL_1/(8*ΔV_out_variable*150*kHz)
C_3graph_50k(1) = 2.08333e-5 C
C_3graph_100k(1) = 1.04167e-5 C
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C_3graph_100k(5) = 2.08333e-6 C
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C_3graph_100k(10) = 1.04167e-6 C
# Pra não ter muita ondulação tem que ter um capacitor de 10m na saída! kk
# Esse estudo dos gráficos pode ficar mais generalista ainda se você transformar as variaveis que são DeltaV e DeltaI nos seus respectivos valores. Ex:
Exemplo_ΔL_1 := 40 %*I_in = 8.33333 A
# Aonde tiver ΔL_1 você substitui por 40%*P/V_in, dessa forma você consegue fazer as variaveis que dependendem de  ΔL_1 variavem com a potência!
Exemplo_L_1 := V_in*D*T/(40 %*P/V_in) = 2.51163e-5 H
Exemplo_ΔL_2 := 40 %*I_o = 6 A
# Aonde tiver ΔL_2 você substitui por 40%*P/V_out
# Por causa da equação do ganho você pode substituir Vin e Vout nas equações por fórmulas que dependam de Vout , D e Vin , D respectivamente. Isso pode ser útil!
Exemplo_L_2 := V_out*(1 - D)*T/(40 %*P/V_out) = 3.48837e-5 H
# A mesma lógica que foi aplicada acima serve aqui:
Exemplo_V_C1 := V_in + V_out = 86 V
Exemplo_ΔV_C1 := 10 %*V_C1 = 8.6 V
Exemplo_ΔV_out := 10 %*V_out = 5 V
# Cuidado para não enxer o TCC com esses gráficos. Mas você vai perceber que eles ajudam a justuficar algumas escolhas de projeto ao mesmo tempo que tornam a análise mais visual.
# [area: Gerador do txt de parâmetros]
# Crie os labels
labels := ["Vin ="; "Vout ="; "Cin ="; "Lin ="; "Lo ="; "Cdc ="; "D ="; "f ="; "R ="]
# Crie os valores em formato texto (retirando as unidades quando necessário)
txt_values := [(V_in/V); (V_out/V); (C_1/F); (L_1/H); (L_2/H); (C_2/F); D; (f_s/Hz); (R_o/Ω)]
# Monte a matriz final para exportação
output := augment(labels, txt_values)
# [component: inputs output]
# <- Edite as propriedades do bloco para alterar o caminho onde o arquivo vai ser salvo
# Se não estiver calculando/gerando seu arquivo é só pressionar Ctrl+F9
