# Title: Buck em MCC: ganho e formas de onda
# Description: Memória de cálculo do Buck em MCC, filtro LC e dimensionamento dos PIs de corrente e potência em cascata.
## Conversor Buck em MCC — memória de cálculo
# Modelo ideal em regime permanente.
Vin := 50*V
Vo := 36*V
Ptotal := 750*W
N := 2
Pfase := Ptotal/N
fs := 100*kHz
L := 75*10^-6*H
C1 := 4.7*10^-6*F
C2 := 4.7*10^-6*F  # L = 75 µH e C1 = C2 = 4,7 µF, reaproveitados do Ćuk.
D := Vo/Vin = 0.72
Dboost := 1 - D
T := 1/fs
Io := Pfase/Vo
dI := (Vo - Vo*D)/(L*fs)
Imin := Io - dI/2
Imax := Io + dI/2
ripple := dI/Io
Duty(x) := Vo/V/x
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## Formas de onda — uma fase
# Comando de Q1: 1 — condução; 0 — bloqueio. Tempo t em µs.
Tus := T/s*1000000
phase(t) := t/Tus - floor(t/Tus)
cmd(t) := floor(1 + D - phase(t))
vl(t) := (Vin*cmd(t) - Vo)/V
a := (Vin*T - Vo*T)/L
b := Vin*T/(2*L)
zWave(t) := phase(t) - D
iBuck(t) := (Imin + a*phase(t) - b*zWave(t) - b*|zWave(t)|)/A
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# Ponto nominal: 50 V → 36 V; 375 W por fase; fs = 100 kHz.
## Relações paramétricas do Buck
# Vo(d) = d·Vin; faixa de saída: 30 a 45 V.
DutyOut(x) := x/(Vin/V)
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## Indutância em função da razão cíclica
# Ondulação de referência: Δi_ref = 1,344 A pico a pico.
dIref := dI
Lreq(d, f) := Vin*d*(1 - d)/(f*dIref)
L100(d) := Lreq(d, 100*kHz)/(10^-6*H)
L50(d) := Lreq(d, 50*kHz)/(10^-6*H)
L150(d) := Lreq(d, 150*kHz)/(10^-6*H)
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# L(D) ∝ D(1−D); para D constante, L ∝ 1/fs.
## Capacitância de saída em função da razão cíclica
# Critério do gráfico: ΔVo = 5% de Vo. Capacitância utilizada: C2 = 4,7 µF.
rV := 0.05
Creq(d, f) := dIref/(8*f*rV*Vin*d)
C100(d) := Creq(d, 100*kHz)/(10^-6*F)
C50(d) := Creq(d, 50*kHz)/(10^-6*F)
C150(d) := Creq(d, 150*kHz)/(10^-6*F)
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# O gráfico apresenta a capacitância mínima para o critério de ondulação indicado.
## Filtro de entrada — uma fase
f0f := 10*kHz
Lfcalc := 1/((2*π*f0f)^2*C1)
Lf := 50*10^-6*H
# Lf calculado: 53,9 µH. Valor aproximado adotado: 50 µH.
## Dimensionamento dos PIs — corrente e potência
# Referência de potência: 375 W em uma fase; ponto nominal: 36 V.
# O PI de potência fornece iref. O PI de corrente comanda o PWM.
# Modelo médio do estágio Buck, com entrada de 50 V após o filtro.
# Portadora de 0 a 1, a 100 kHz; ganho do modulador unitário.
# Fontes: Erickson e Maksimovic (2001), seção 9.5.2; Wang et al. (2026).
Lc := 7e-5*H
rL := 0.028*V/A
Rload := Vo^2/Pfase
# Lc é a indutância de 70 µH do esquema usado na análise do controle.
# As seções anteriores conservam L = 75 µH, reaproveitado do Ćuk.
# rL = 28 mΩ representa a resistência série indicada no esquema.
j := (-1)^(1/2)
Gid(p) := Vin*(C2*p + 1/Rload)/(Lc*C2*p^2 + (Lc/Rload + rL*C2)*p + 1 + rL/Rload)
# Gid(p) = corrente no indutor / razão cíclica; p está em s⁻¹.
# Critérios: corrente em fs/200 = 500 Hz; potência em 50 Hz.
# Zeros: corrente em 750 Hz; potência em 50 Hz; margem mínima: 60°.
fci := fs/200
fzi := 1.5*fci
fcp := fci/10
fzp := fcp
wci := 2*π*fci
wzi := 2*π*fzi
wcp := 2*π*fcp
wzp := 2*π*fzp
# Corrente: |Ci(jωci)·Gid(jωci)| = 1; |Gid(jωci)| = 14,3872 A.
Kpi := 1/(|Gid(j*wci)|*(1 + (wzi/wci)^2)^0.5)
Kii := Kpi*wzi
Tpi := Kpi/Kii
# Kpi = 0,0385550 A⁻¹; Kii = 181,6863 (A·s)⁻¹.
# Campos do PSIM: Gain = Kpi; Time Constant = Tpi = 212,207 µs.
Ci(p) := Kpi + Kii/p
Li(p) := Ci(p)*Gid(p)
Ti(p) := Li(p)/(1 + Li(p))
# A malha externa utiliza a corrente regulada pela malha interna.
# P = vo²/Rload; p̂ = (2·Vo/Rload)·v̂o.
Gp(p) := 2*Vo*Ti(p)/(1 + Rload*C2*p)
# Potência: |Cp(jωcp)·Gp(jωcp)| = 1; |Gp(jωcp)| = 70,9378 W/A.
# Limites: iref de 0 a 24 A; comando do PWM de 0,05 a 0,95.
Kpp := 1/(|Gp(j*wcp)|*(1 + (wzp/wcp)^2)^0.5)
Kip := Kpp*wzp
Tpp := Kpp/Kip
# Kpp = 0,00996799 A/W; Kip = 3,131535 A/(W·s).
# Campos do PSIM: Gain = Kpp; Time Constant = Tpp = 3,18310 ms.
Cp(p) := Kpp + Kip/p
Lp(p) := Cp(p)*Gp(p)
## Diagramas de Bode das duas malhas abertas
# Eixo x = log10(f/Hz); x de 0 a 5 representa 1 Hz a 100 kHz.
wB(x) := 2*π*10^x/s
MagI(x) := 20*log(|Li(j*wB(x))|)
FaseI(x) := 180/π*arg(Li(j*wB(x)))
MagP(x) := 20*log(|Lp(j*wB(x))|)
FaseP(x) := 180/π*arg(Lp(j*wB(x)))
## Malha de corrente
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## Malha de potência
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## Cruzamentos e margens de fase
xci := root(MagI(x), x, 0, 5)
fci_calc := 10^xci/s
MFI := 180 + FaseI(xci)
xcp := root(MagP(x), x, 0, 5)
fcp_calc := 10^xcp/s
MFP := 180 + FaseP(xcp)
# Corrente: cruzamento de 500 Hz; margem de fase de 122,96°.
# Potência: cruzamento de 50 Hz; margem de fase de 127,92°.
# Análise em pequenos sinais no ponto nominal, fora da saturação.
