# Conversor Ćuk em CCM
# Tensão de Entrada:
V_in := 36 V
# Tensão de Saída:
V_out := 50 V
# Potência:
P := 750 W
# Corrente de saída
I_o := P/V_out = 15 A
# Corrente de entrada
I_in := P/V_in = 20.8333 A
# Frequência de
# Comutação
f_s := 100 kHz
# Período de
# Comutação
T := 1/f_s = 1e-5 s
# Ondulação de Corrente
# Pico a Pico em L1
ΔL_1 := 40 %*I_in = 8.33333 A
# Ondulação de corrente pico a pico em L2
ΔL_2 := 40 %*I_o = 6 A
# Dimensionamento dos componentes
# Ciclo de Trabalho
# Calculado (D):
D_calculado := V_out/(V_in + V_out) = 0.581395
# Ciclo de Trabalho
# Adotado (D):
D := D_calculado = 0.581395
# Tensão Média no Capacitor
# de Transferência (VC1):
V_C1 := V_in + V_out = 86 V
# Indutor de
# Entrada (L1):
L_1 := V_in*D*T/ΔL_1 = 2.51163e-5 H
# Indutor de
# Saída (L2):
L_2 := V_out*(1 - D)*T/ΔL_2 = 3.48837e-5 H
# Ondulação de Tensão
# em C1
ΔV_C1 := 5 %*V_C1 = 4.3 V
# Ondulação de Tensão
# em C2
ΔV_out := 5 %*V_out = 2.5 V
# Em C2, a tensão média é Vout e a ondulação adotada é 5% de Vout. A expressão de capacitância considera a parcela capacitiva da ondulação, sem ESR.
# Capacitor de Transferência
# de Energia (C1):
# Capacitor de saída (C2):
# Carga de saída:
C_1 := I_o*D*T/ΔV_C1 = 2.02812e-5 F
C_2 := ΔL_2*T/(8*ΔV_out)
R_o := V_out^2/P = 3.33333 Ω
# Recálculo dos indutores para 375 W
# Mantêm-se as tensões, a frequência e a ondulação relativa de corrente de 40%. Com metade da potência, as indutâncias dobram.
P_375 := 375 W
L_1_375 := V_in*D*T/(40 %*P_375/V_in)
L_2_375 := V_out*(1 - D)*T/(40 %*P_375/V_out)
# [area: Gráficos]
# Análises paramétricas das equações ideais em condução contínua. Vout representa o módulo da tensão de saída; as curvas não verificam o modo de condução em toda a faixa.
# Varia-se um parâmetro por vez. As ondulações absolutas permanecem nos valores nominais, salvo indicação em contrário. ΔL1 e ΔL2 representam ondulações de corrente pico a pico, em A.
D_graph(V_out_variable) := V_out_variable/(V_in + V_out_variable)
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# Com Vin fixo, D aumenta com Vout. A curva representa o ganho estático ideal; o comportamento de partida requer uma análise dinâmica específica.
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# Com Vin fixo, D tende a 1 quando Vout aumenta. O ponto nominal é D ≈ 0,581. A relação estática, isoladamente, não determina um limite de estabilidade para a razão cíclica.
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# p.u. significa per unit: razão adimensional entre a grandeza e seu valor de referência.
D_graph1(V_in_variable) := V_out/(V_in_variable + V_out)
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L_graph100k(D_variable) := V_in*D_variable/(ΔL_1*100*kHz)
L_graph50k(D_variable) := V_in*D_variable/(ΔL_1*50*kHz)
L_graph150k(D_variable) := V_in*D_variable/(ΔL_1*150*kHz)
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# Com Vin e a ondulação de corrente fixos, L1 cresce linearmente com D. Para o mesmo D, L1 é inversamente proporcional à frequência de comutação.
# Relação do ganho isolada para Vin:
Vin := V_out*(1 - D)/D = 36 V
L_graph50k_D(D_variable) := V_out*(1 - D_variable)/D_variable*D_variable/(ΔL_1*50*kHz)
L_graph150k_D(D_variable) := V_out*(1 - D_variable)/D_variable*D_variable/(ΔL_1*150*kHz)
L_graph100k_D(D_variable) := V_out*(1 - D_variable)/D_variable*D_variable/(ΔL_1*100*kHz)
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# Nesta varredura, Vout é fixo e Vin varia com D. Na anterior, Vin era fixo. A diferença entre as curvas decorre dessas condições.
L_graph_100k(V_in_variable) := V_in_variable*(V_out/(V_in_variable + V_out))/(ΔL_1*100*kHz)
L_graph_50k(V_in_variable) := V_in_variable*(V_out/(V_in_variable + V_out))/(ΔL_1*50*kHz)
L_graph_150k(V_in_variable) := V_in_variable*(V_out/(V_in_variable + V_out))/(ΔL_1*150*kHz)
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# Com Vout e a ondulação absoluta de corrente fixos, L1 cresce com Vin e tende a Vout/(ΔL1·fs). O limite depende das hipóteses adotadas nesta varredura.
# Em Vin = 36 V, a curva de 100 kHz recupera o valor nominal calculado para L1.
L_graph1_50k(V_out_variable) := V_in*(V_out_variable/(V_in + V_out_variable))/(ΔL_1*50*kHz)
L_graph1_150k(V_out_variable) := V_in*(V_out_variable/(V_in + V_out_variable))/(ΔL_1*150*kHz)
L_graph1_100k(V_out_variable) := V_in*(V_out_variable/(V_in + V_out_variable))/(ΔL_1*100*kHz)
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# Com Vin fixo, L1 cresce com Vout e tende a Vin/(ΔL1·fs). O limite difere do gráfico anterior porque a tensão mantida constante é outra.
# Em Vout = 50 V, a curva de 100 kHz recupera o valor nominal calculado para L1.
L_2graph100k(D_variable) := V_out*(1 - D_variable)/(ΔL_2*100*kHz)
L_2graph50k(D_variable) := V_out*(1 - D_variable)/(ΔL_2*50*kHz)
L_2graph150k(D_variable) := V_out*(1 - D_variable)/(ΔL_2*150*kHz)
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# Com Vout e a ondulação de corrente fixos, L2 diminui linearmente com D. Para o mesmo D, L2 é inversamente proporcional à frequência de comutação.
# Menor indutância, isoladamente, não determina menor volume do componente.
# O efeito da frequência sobre perdas e volume exige avaliar também o semicondutor e o projeto magnético.
# Relação do ganho isolada para Vout:
Vout := D*V_in/(1 - D) = 50 V
L_2graph100k_D(D_variable) := D_variable*V_in/(1 - D_variable)*(1 - D_variable)/(ΔL_2*100*kHz)
L_2graph50k_D(D_variable) := D_variable*V_in/(1 - D_variable)*(1 - D_variable)/(ΔL_2*50*kHz)
L_2graph150k_D(D_variable) := D_variable*V_in/(1 - D_variable)*(1 - D_variable)/(ΔL_2*150*kHz)
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L_2graph50k_V(V_in_variable) := V_out*(1 - (V_out/(V_in_variable + V_out)))/(ΔL_2*50*kHz)
L_2graph150k_V(V_in_variable) := V_out*(1 - (V_out/(V_in_variable + V_out)))/(ΔL_2*150*kHz)
L_2graph100k_V(V_in_variable) := V_out*(1 - (V_out/(V_in_variable + V_out)))/(ΔL_2*100*kHz)
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L_2graph1_50k(V_out_variable) := V_out_variable*(1 - (V_out_variable/(V_in + V_out_variable)))/(ΔL_2*50*kHz)
L_2graph1_150k(V_out_variable) := V_out_variable*(1 - (V_out_variable/(V_in + V_out_variable)))/(ΔL_2*150*kHz)
L_2graph1_100k(V_out_variable) := V_out_variable*(1 - (V_out_variable/(V_in + V_out_variable)))/(ΔL_2*100*kHz)
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# Comparação entre L2(Vout) e L1(Vin), a 100 kHz.
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# Curvas próximas, com condições distintas.
# Cada curva depende das hipóteses adotadas.
C_1graph100k(D_variable) := I_o*D_variable/(ΔV_C1*100*kHz)
C_1graph50k(D_variable) := I_o*D_variable/(ΔV_C1*50*kHz)
C_1graph150k(D_variable) := I_o*D_variable/(ΔV_C1*150*kHz)
C_2graph100k := ΔL_2/(8*ΔV_out*100*kHz)
C_2graph50k := ΔL_2/(8*ΔV_out*50*kHz)
C_2graph150k := ΔL_2/(8*ΔV_out*150*kHz)
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C_1graph_50k(V_in_variable) := I_o*(V_out/(V_in_variable + V_out))/(ΔV_C1*50*kHz)
C_1graph_150k(V_in_variable) := I_o*(V_out/(V_in_variable + V_out))/(ΔV_C1*150*kHz)
C_1graph_100k(V_in_variable) := I_o*(V_out/(V_in_variable + V_out))/(ΔV_C1*100*kHz)
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C_1graph_50k_P(P_variable) := P_variable/V_out*(V_out/(V_in + V_out))/(ΔV_C1*50*kHz)
C_1graph_150k_P(P_variable) := P_variable/V_out*(V_out/(V_in + V_out))/(ΔV_C1*150*kHz)
C_1graph_100k_P(P_variable) := P_variable/V_out*(V_out/(V_in + V_out))/(ΔV_C1*100*kHz)
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C_2graph_50k(ΔL_2variable) := ΔL_2variable*A/(8*ΔV_out*50*kHz)
C_2graph_100k(ΔL_2variable) := ΔL_2variable*A/(8*ΔV_out*100*kHz)
C_2graph_150k(ΔL_2variable) := ΔL_2variable*A/(8*ΔV_out*150*kHz)
C_3graph_50k(ΔV_out_variable) := ΔL_2/(8*ΔV_out_variable*V*50*kHz)
C_3graph_100k(ΔV_out_variable) := ΔL_2/(8*ΔV_out_variable*V*100*kHz)
C_3graph_150k(ΔV_out_variable) := ΔL_2/(8*ΔV_out_variable*V*150*kHz)
C_3graph_50k(1) =  # no stored result
C_3graph_100k(1) =  # no stored result
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C_3graph_100k(5) =  # no stored result
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C_3graph_100k(10) =  # no stored result
# O argumento de tensão é expresso em V. Maior ΔVout admissível reduz C2.
# Para manter a ondulação relativa de corrente em 40% ao variar a potência, substitui-se a ondulação absoluta pela expressão correspondente abaixo.
Exemplo_ΔL_1 := 40 %*I_in = 8.33333 A
# Substitui-se ΔL_1 por 40% × P/V_in, explicitando a dependência de  ΔL_1 com a potência.
Exemplo_L_1 := V_in*D*T/(40 %*P/V_in) = 2.51163e-5 H
Exemplo_ΔL_2 := 40 %*I_o = 6 A
# Substitui-se ΔL_2 por 40% × P/V_out
# A relação de ganho permite expressar Vin em função de Vout e D, ou Vout em função de Vin e D, conforme a tensão mantida constante.
Exemplo_L_2 := V_out*(1 - D)*T/(40 %*P/V_out) = 3.48837e-5 H
# Exemplos algébricos com 10% de ondulação de tensão; o critério nominal permanece em 5%.
Exemplo_V_C1 := V_in + V_out = 86 V
Exemplo_ΔV_C1 := 10 %*V_C1 = 8.6 V
Exemplo_ΔV_out := 10 %*V_out = 5 V
# Os exemplos finais mostram como explicitar a dependência das ondulações com a potência e as tensões. São auxiliares e não alteram os critérios nominais adotados.
